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/batch
! ANSYS input file written by Workbench version 2024 R1
! File used for geometry attach: C:\Users\Hp\AppData\Local\Temp\PhysicsTransfer\ansys.pmdb
/title,wbnew--Static Structural (B5)
/COM,/COM,     ANSYSMotion, 2024.1
/com,--- Data in consistent MKS units. See Solving Units in the help system for more information.
/units,MKS
/prep7
! Turn off shape checking because checks already performed inside WB mesher.
! See help system for more information.
SHPP,OFF,,NOWARN
etcon,set             ! allow ANSYS to choose best KEYOP's for 180x elements, resets any applicable keyopt to MAPDL defaults
/com,*********** Nodes for the whole assembly ***********
nblock,3,,4057
(1i9,3e20.9e3)
        1     6.500000000E-02     3.412910095E-02     1.200000000E-01
        2     6.500000000E-02     3.412910095E-02     1.100000000E-01
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-1
/com,*********** Elements for Body 1 "Simulation Model 1:1 > Body1|Body_1" ***********
et,1,187
eblock,19,solid,,1509
(19i9)
        1        1        1        1        0        0        0        0       10        0        1      195      374      730      370     1784     2591     1786     1783
     2579     2580
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-1
/com,*********** Send User Defined Coordinate System(s) ***********
csys,0
toffst,273.15,  ! Temperature offset from absolute zero
/com,*********** Set Reference Temperature ***********
tref,22.
/com,*********** Send Materials ***********
MP,DENS,1,2700,	! kg m^-3
MP,EX,1,68900000000,	! Pa
MP,NUXY,1,0.33,
MP,KXX,1,230,	! W m^-1 C^-1
MP,C,1,897,	! J kg^-1 C^-1
MP,ALPX,1,2.36e-05,	! C^-1

!************************* Model Summary ********************
!Simulation Model 1:1 > Body1|Body_1,	Aluminum,	matid,	1
!************************* End Model Summary ********************
/com,*********** Fixed Supports ***********
CMBLOCK,_FIXEDSU,NODE,      270
(8i10)
       262       274       275       276       277       278       279       280
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cmsel,s,_FIXEDSU
d,all,all
nsel,all
/com,*********** Define Pressure Using Surface Effect Elements "Pressure" ***********
et,2,154
mat,2
eblock,10,,,146
(15i9)
     2920        2        2        2        0        1       18        9        9      733      802        9      732
     2921        2        2        2        0        9       18       32       32      802      849       32      803
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-1
esel,s,type,,2
keyop,2,7,0                ! Use deformed area for application of load
esel,all
esel,all
fini
/com,****************************************************************************
/com,*************************    SOLUTION       ********************************
/com,****************************************************************************
/solu
antype,0                   ! static analysis
_thickRatio=  0     ! Ratio of thick parts in the model
eqsl,sparse,,,,,1
cntr,print,1               ! print out contact info and also make no initial contact an error
cncheck,dmp		!	Enable program controlled contact splitting for distributed memory parallel run
dmpoption,emat,no             ! Don't combine emat file for DANSYS
dmpoption,esav,no             ! Don't combine esav file for DANSYS
nldiag,cont,iter           ! print out contact info each equilibrium iteration
rescontrol,,none                 ! Do not keep any restart files
/com,****************************************************
/com,******************* SOLVE FOR LS 1 OF 1 ****************
esel,s,type,,2
nsle
sf,all,pres,101043.
nsel,all
esel,all
esel,all
nsub,1,1,1
time,1.
outres,erase
outres,all,none
outres,nsol,all,
outres,rsol,all
outres,eangl,all
outres,etmp,all
outres,veng,all
outres,strs,all,
outres,epel,all,
outres,eppl,all,
outres,cont,all,
! *********** WB SOLVE COMMAND ***********
! check interactive state
*get,ANSINTER_,active,,int
*if,ANSINTER_,ne,0,then
/eof
*endif
solve
/com *************** Write FE CONNECTORS *********
CEWRITE,file,ce,,INTE
/com,****************************************************
/com,*************** FINISHED SOLVE FOR LS 1 *************
*get,_NSOLTHREADS,active,0,ntfs
*get,_NSOLPROCESSES,active,0,npfs
/post1
fini
